clear
new circuit.cable_cn_one bus1=source basekv=12.47 pu=1 phases=3 r1=.01 x1=.03 r0=.02 x0=.06
set earthmodel=carson
new cndata.wire0 rac=.0002 rdc=.00019 runits=m gmrac=.006 gmrunits=m radius=.008 radunits=m epsr=2.3 inslayer=.005 diains=.026 diacable=.032 k=13 gmrstrand=.0006 diastrand=.0016 rstrand=.008
new linegeometry.cable nconds=1 nphases=1 reduce=yes
~ cond=1 cncable=wire0 x=0.0 h=-1 units=m
new line.cable phases=1 bus1=source.2 bus2=end.2 geometry=cable length=500 units=m
new load.loadB phases=1 bus1=end.2 conn=wye kv=7.199557856794634 kw=200 kvar=40 vminpu=0 vmaxpu=1000000
set maxiterations=200 tolerance=1e-10
solve
